// SBML level 2 version 4
// dcterms:bibliographicCitation: http://identifiers.org/pubmed/12180966

function Function_for_hexokinase(ADP, ATP, G6P, GLCi, Kadp_2, Katp_2, Keq_2, Kg6p_2, Kglc_2, Vmax_2)
  Vmax_2*(GLCi*ATP/(Kglc_2*Katp_2) - G6P*ADP/(Kglc_2*Katp_2*Keq_2))/((1 + GLCi/Kglc_2 + G6P/Kg6p_2)*(1 + ATP/Katp_2 + ADP/Kadp_2));
end

function Function_for_phosphofructokinase(Vmax_4, gR_4, F6P, ATP, Katp_4, Kf6p_4, L0_4, Ciatp_4, Kiatp_4, Camp_4, AMP, Kamp_4, Cf26_4, F26P2, Kf26_4, Cf16_4, F16P2, Kf16_4, Catp_4)
  Vmax_4*gR_4*(F6P/Kf6p_4)*(ATP/Katp_4)*(1 + F6P/Kf6p_4 + ATP/Katp_4 + gR_4*F6P/Kf6p_4*ATP/Katp_4)/((1 + F6P/Kf6p_4 + ATP/Katp_4 + gR_4*F6P/Kf6p_4*ATP/Katp_4)^2 + L0_4*((1 + Ciatp_4*ATP/Kiatp_4)/(1 + ATP/Kiatp_4))^2*((1 + Camp_4*AMP/Kamp_4)/(1 + AMP/Kamp_4))^2*((1 + Cf26_4*F26P2/Kf26_4 + Cf16_4*F16P2/Kf16_4)/(1 + F26P2/Kf26_4 + F16P2/Kf16_4))^2*(1 + Catp_4*ATP/Katp_4)^2);
end

function Function_for_aldolase(DHAP, F16bP, Kdhap_5, Keq_5, Kf16bp_5, Vmax_5, G3P, Kg3p_5, Kig3p_5)
  Vmax_5*(F16bP/Kf16bp_5 - DHAP*G3P/(Kf16bp_5*Keq_5))/(1 + F16bP/Kf16bp_5 + DHAP/Kdhap_5 + G3P/Kg3p_5 + F16bP*G3P/(Kf16bp_5*Kig3p_5) + DHAP*G3P/(Kdhap_5*Kg3p_5));
end

function Function_for_glycerol_3_phosphate_dehydrogenase(DHAP, Glycerol, NAD, NADH, Vmax_14, Kdhap_14, Knadh_14, Keq_14, Kglycerol_14, Knad_14)
  Vmax_14*(DHAP/Kdhap_14*(NADH/Knadh_14) - Glycerol/Kdhap_14*(NAD/Knadh_14)*(1/Keq_14))/((1 + DHAP/Kdhap_14 + Glycerol/Kglycerol_14)*(1 + NADH/Knadh_14 + NAD/Knad_14));
end
Function_for_glycerol_3_phosphate_dehydrogenase is "Function for glycerol-3-phosphate dehydrogenase";

function Function_for_Lactate_dehydrogenase(Lac, NAD, NADH, Pyr, Vmaxv16, Keqv16)
  Vmaxv16*(Pyr*NADH - Lac*NAD/Keqv16);
end

function Function_for_3_phosphoglycerate_kinase(ADP, ATP, BPG, P3G, Vmax_7, Keq_7, Kp3g_7, Katp_7, Kbpg_7, Kadp_7)
  Vmax_7*((Keq_7*BPG*ADP - P3G*ATP)/(Kp3g_7*Katp_7))/((1 + BPG/Kbpg_7 + P3G/Kp3g_7)*(1 + ADP/Kadp_7 + ATP/Katp_7));
end
Function_for_3_phosphoglycerate_kinase is "Function for 3-phosphoglycerate kinase";

function Function_for_glucose_transport(GLCi, GLCo, Kglc_1, Ki_1, Vmax_1)
  Vmax_1*(GLCo - GLCi)/Kglc_1/(1 + (GLCo + GLCi)/Kglc_1 + Ki_1*GLCo*GLCi/Kglc_1^2);
end

function Function_for_enolase(P2G, PEP, Vmax_9, Kp2g_9, Keq_9, Kpep_9)
  Vmax_9*(P2G/Kp2g_9 - PEP/(Kp2g_9*Keq_9))/(1 + P2G/Kp2g_9 + PEP/Kpep_9);
end

function Function_for_phosphoglyceromutase(P2G, P3G, Vmax_8, Kp3g_8, Keq_8, Kp2g_8)
  Vmax_8*(P3G/Kp3g_8 - P2G/(Kp3g_8*Keq_8))/(1 + P3G/Kp3g_8 + P2G/Kp2g_8);
end

function Function_for_pyruvate_decarboxylase(PYR, Vmax_11, Kpyr_11, nH_11)
  Vmax_11*(PYR/Kpyr_11)^nH_11/(1 + (PYR/Kpyr_11)^nH_11);
end

function Function_for_Lactate_exchange(Lac, Lacex, Vmaxv15, Keqv15)
  Vmaxv15*(Lacex - Lac/Keqv15);
end

function Function_for_phosphoglucose_isomerase(F6P, G6P, Keq_3, Kf6p_3, Kg6p_3, Vmax_3)
  Vmax_3*(G6P/Kg6p_3 - F6P/(Kg6p_3*Keq_3))/(1 + G6P/Kg6p_3 + F6P/Kf6p_3);
end

function Function_for_pyruvate_kinase__1(ADP, ATP, Kadp_11, Katp_11, Keq_11, Kpep_11, Kpyr_11, PEP, PYR, Vmax_11)
  Vmax_11*(PEP*ADP/(Kpep_11*Kadp_11) - PYR*ATP/(Kpep_11*Kadp_11*Keq_11))/((1 + PEP/Kpep_11 + PYR/Kpyr_11)*(1 + ADP/Kadp_11 + ATP/Katp_11));
end
Function_for_pyruvate_kinase__1 is "Function for pyruvate kinase [1]";

function Function_for_GAPDH__1(NAD, G3P, BGP, NADH, Vmax_17, Knadh_17, Kg3p_17, Keq_17, Knad_17, Kbgp_17)
  Vmax_17/(Knadh_17*Kg3p_17)*(NAD*G3P - BGP*NADH/Keq_17)/((1 + NAD/Knad_17)*(1 + G3P/Kg3p_17) + (1 + NADH/Knadh_17)*(1 + BGP/Kbgp_17) - 1);
end
Function_for_GAPDH__1 is "Function for GAPDH [1]";

model CardioGlyco()
  // Karlstaedt2019 - G6P accumulation via Phosphoglucose isomerase inhibition in heart muscles
  // This model is described in the article:
  // Glucose 6-phosphate accumulates via phosphoglucose isomerase inhibition in heart muscle.
  // Karlstaedt, A and Khanna, R and Thangam, M and Taegtmeyer, H Circulation Research (2019)
  // The model describes glycolysis (including pyruvate oxidation and ATP turnover) in cardiomyocytes. An extension of the same model includes the pentose phosphate pathway.
  // isDerivedFrom biomodels.db:MODEL8293171637 biomodels.db:BIOMD0000000172 kegg.pathway:sce00010 GO:0006096 taxonomy:4932 biomodels.db:BIOMD0000000064
  // biomodels.db:MODEL8293171637
  // biomodels.db:BIOMD0000000172
  // isPartOf kegg.pathway:sce00010
  // isVersionOf GO:0006096
  // hasTaxon taxonomy:4932

  // Compartments:
  compartment cell = 1; cell is "cytosol";  // GO:0005829
  compartment ext = 1; ext is "exterior";  // GO:0005576

  // Species:
  species $GLCo in ext = 5.5; GLCo is "Glc(ext)";  // CHEBI:4167; kegg.compound:C00031
  species GLCi in cell = 0.0927; GLCi is "Glc(int)";  // CHEBI:4167; kegg.compound:C00031
  species ATP in cell = 3.0417;  // kegg.compound:C00002; CHEBI:15422
  species G6P in cell = 0.8393;  // CHEBI:17665; kegg.compound:C00668
  species ADP in cell = 0.77;  // CHEBI:16761; kegg.compound:C00008
  species F6P in cell = 0.2765;  // CHEBI:16084; kegg.compound:C05345
  species F16bP in cell = 0.02; F16bP is "Fru1,6-P2";  // CHEBI:28013; kegg.compound:C05378
  species AMP in cell = 0.4332;  // CHEBI:16027; kegg.compound:C00020
  species $F26bP in cell = 0.069; F26bP is "Fru2,6-P2";  // kegg.compound:C00665; CHEBI:28602
  species DHAP in cell = 0.0313;  // kegg.compound:C00111; CHEBI:16108
  species GAP in cell = 0.001447426; GAP is "G3P";  // kegg.compound:C00118; CHEBI:29052
  species NAD in cell = 3.2962;  // CHEBI:15846; kegg.compound:C00003
  species BPG in cell = 0.0002342727;  // CHEBI:16001; kegg.compound:C00236
  species NADH in cell = 0.0038;  // CHEBI:16908; kegg.compound:C00004
  species P3G in cell = 0.1367;  // kegg.compound:C00197; CHEBI:17794
  species P2G in cell = 0.0208;  // CHEBI:17835; kegg.compound:C00631
  species PEP in cell = 0.0212;  // CHEBI:18021; kegg.compound:C00074
  species PYR in cell = 0.0063; PYR is "Pyr";  // kegg.compound:C00022; CHEBI:15361
  species AcAld in cell = 0.1066; AcAld is "Lac";  // kegg.compound:C00084; CHEBI:15343
  species $CO2 in cell = 1;  // CHEBI:16526; kegg.compound:C00011
  species $Glycerol in cell = 0.15; Glycerol is "glycerol";  // CHEBI:17754; kegg.compound:C00116
  species $Glycogen in cell = 0.02; Glycogen is "glycogen";  // kegg.compound:C00182; CHEBI:28087
  species $Succinate in cell = 0; Succinate is "Lac(ext)";  // kegg.compound:C00042; CHEBI:30031

  // Reactions:
  HXT: $GLCo -> GLCi; Function_for_glucose_transport(GLCi, GLCo, Kglc_1, Ki_1, Vmax_1); HXT is "Glucose transport";  // isVersionOf GO:0015758
    Kglc_1 = 10; Ki_1 = 0.91; Vmax_1 = 106;
  HK: GLCi + ATP -> G6P + ADP; cell*Function_for_hexokinase(ADP, ATP, G6P, GLCi, Kadp_2, Katp_2, Keq_2, Kg6p_2, Kglc_2, Vmax_2); HK is "Hexokinase";  // kegg.reaction:R02848; isVersionOf GO:0004396; isVersionOf ec-code:2.7.1.1
    Kadp_2 = 0.54; Katp_2 = 0.78; Keq_2 = 2000; Kg6p_2 = 5.4; Kglc_2 = 0.23; Vmax_2 = 230;
  PGI: G6P -> F6P; cell*Function_for_phosphoglucose_isomerase(F6P, G6P, Keq_3, Kf6p_3, Kg6p_3, Vmax_3); PGI is "Phosphoglucose isomerase";  // kegg.reaction:R00771; isVersionOf ec-code:5.3.1.9; isVersionOf GO:0004347
    Keq_3 = 0.28; Kf6p_3 = 0.3; Kg6p_3 = 0.425; Vmax_3 = 604;
  PFK: ATP + F6P => ADP + F16bP; cell*Function_for_phosphofructokinase(Vmax_4, gR_4, F6P, ATP, Katp_4, Kf6p_4, L0_4, Ciatp_4, Kiatp_4, Camp_4, AMP, Kamp_4, Cf26_4, F26bP, Kf26_4, Cf16_4, F16bP, Kf16_4, Catp_4); PFK is "Phosphofructosekinase";  // modifiers: AMP, F26bP; kegg.reaction:R00756; isVersionOf ec-code:2.7.1.11; isVersionOf GO:0003872
    Vmax_4 = 80; gR_4 = 5.12; Katp_4 = 0.71; Kf6p_4 = 1.5; L0_4 = 0.66; Ciatp_4 = 100; Kiatp_4 = 0.65; Camp_4 = 0.0845; Kamp_4 = 0.0995; Cf26_4 = 0.0174; Kf26_4 = 0.000682; Cf16_4 = 0.397; Kf16_4 = 0.111; Catp_4 = 3;
  ALD: F16bP -> DHAP + GAP; cell*Function_for_aldolase(DHAP, F16bP, Kdhap_5, Keq_5, Kf16bp_5, Vmax_5, GAP, Kg3p_5, Kig3p_5); ALD is "Aldolase";  // kegg.reaction:R01068; isVersionOf ec-code:4.1.2.13; isVersionOf GO:0004332
    Kdhap_5 = 2; Keq_5 = 0.069; Kf16bp_5 = 0.3; Vmax_5 = 94.69; Kg3p_5 = 2.4; Kig3p_5 = 10;
  TPI: DHAP -> GAP; cell*(TPI_k1*DHAP - TPI_k2*GAP); TPI is "Triosephosphate isomerase";  // kegg.reaction:R01015; isVersionOf GO:0004807; isVersionOf ec-code:5.3.1.1
    TPI_k1 = 450000; TPI_k2 = 10000000;
  PGK: ADP + BPG -> ATP + P3G; cell*Function_for_3_phosphoglycerate_kinase(ADP, ATP, BPG, P3G, Vmax_7, Keq_7, Kp3g_7, Katp_7, Kbpg_7, Kadp_7); PGK is "3-phosphoglycerate kinase";  // kegg.reaction:R01512; isVersionOf GO:0004618; isVersionOf ec-code:2.7.2.3
    Vmax_7 = 1288; Keq_7 = 3200; Kp3g_7 = 0.53; Katp_7 = 0.3; Kbpg_7 = 0.003; Kadp_7 = 0.2;
  PGM: P3G -> P2G; cell*Function_for_phosphoglyceromutase(P2G, P3G, Vmax_8, Kp3g_8, Keq_8, Kp2g_8); PGM is "Phosphoglyceromutase";  // kegg.reaction:R01518; isVersionOf ec-code:5.4.2.1; isVersionOf GO:0004619
    Vmax_8 = 2585; Kp3g_8 = 1.2; Keq_8 = 0.19; Kp2g_8 = 0.08;
  ENO: P2G -> PEP; cell*Function_for_enolase(P2G, PEP, Vmax_9, Kp2g_9, Keq_9, Kpep_9); ENO is "Enolase";  // kegg.reaction:R00658; isVersionOf ec-code:4.2.1.11; isVersionOf GO:0004634
    Vmax_9 = 201.6; Kp2g_9 = 0.04; Keq_9 = 2.8; Kpep_9 = 0.04;
  PYK: ADP + PEP -> ATP + PYR; cell*Function_for_pyruvate_kinase__1(ADP, ATP, Kadp_11, Katp_11, Keq_11, Kpep_11, PYK_Kpyr_11, PEP, PYR, PYK_Vmax_11); PYK is "Pyruvate kinase";  // kegg.reaction:R00200; isVersionOf GO:0004743; isVersionOf ec-code:2.7.1.40
    Kadp_11 = 0.53; Katp_11 = 1.5; Keq_11 = 6500; Kpep_11 = 0.14; PYK_Kpyr_11 = 21; PYK_Vmax_11 = 1000;
  PDC: PYR => $CO2; cell*Function_for_pyruvate_decarboxylase(PYR, PDC_Vmax_11, PDC_Kpyr_11, nH_11); PDC is "Pyruvate decarboxylase";  // kegg.reaction:R00636; isVersionOf ec-code:4.1.1.1; isVersionOf GO:0004737
    PDC_Vmax_11 = 857.8; PDC_Kpyr_11 = 4.33; nH_11 = 1.9;
  AK: AMP + ATP -> 2 ADP; cell*(AK_k1*AMP*ATP - AK_k2*ADP^2); AK is "Adenylate kinase";  // kegg.reaction:R00127; isVersionOf GO:0004017; isVersionOf ec-code:2.7.4.3
    AK_k1 = 45; AK_k2 = 100;
  G3PDH: DHAP + NADH => NAD + $Glycerol; cell*Function_for_glycerol_3_phosphate_dehydrogenase(DHAP, NAD, Glycerol, NADH, Vmax_14, Kdhap_14, Knadh_14, Keq_14, Kglycerol_14, Knad_14); G3PDH is "Glycerol-3-phosphate dehydrogenase";  // hasPart kegg.reaction:R00842; hasPart kegg.reaction:R07298; hasVersion ec-code:1.1.1.8; hasVersion ec-code:3.1.3.21
    Vmax_14 = 47.11; Kdhap_14 = 0.4; Knadh_14 = 0.023; Keq_14 = 4300; Kglycerol_14 = 1; Knad_14 = 0.93;
  Glycogen_Branch: ATP + G6P => ADP + $Glycogen; cell*Glycogen_Branch_k1*ATP*G6P; Glycogen_Branch is "Glycogen_Synthesis";  // isVersionOf GO:0005978
    Glycogen_Branch_k1 = 6;
  Lactate_exchange: $Succinate -> AcAld; cell*Function_for_Lactate_exchange(AcAld, Succinate, Vmaxv15, Keqv15);
    Vmaxv15 = 400; Keqv15 = 1;
  Lactate_dehydrogenase: NADH + PYR -> AcAld + NAD; cell*Function_for_Lactate_dehydrogenase(AcAld, NAD, NADH, PYR, Vmaxv16, Keqv16);
    Vmaxv16 = 2800000; Keqv16 = 39000;
  GAPDH: GAP + NAD -> NADH + BPG; cell*Function_for_GAPDH__1(GAP, NAD, NADH, BPG, Vmax_17, Knadh_17, Kg3p_17, Keq_17, Knad_17, Kbgp_17);
    Vmax_17 = 22620; Knadh_17 = 0.06; Kg3p_17 = 0.41; Keq_17 = 0.000192; Knad_17 = 0.09; Kbgp_17 = 0.0098;
  ATPase: ATP => ADP; cell*ATPase_k1*ATP;
    ATPase_k1 = 3.95;

  // Unit definitions:
  unit time = 60 second;
  unit substance = 1e-3 mole;
end
